// COMSOL Multiphysics 6.2.0.290 model "laminar flow in split pipe for gasoline.mph"
// Outline of the model tree

Geometry
  geom1 "Geometry 1" (3D, length unit m)
    cyl1: Cylinder "pipe body" | axistype = x; r = 1[mm]; h = 10[mm]
    tor1: Torus "split1" | pos = {10[mm], -5[mm], 0}; rmaj = 5[mm]; rmin = 1[mm]; angle = 90
    tor2: Torus "split2" | pos = {10[mm], 5[mm], 0}; rot = 270; rmaj = 5[mm]; rmin = 1[mm]; angle = 90
    uni1: Union | input = cyl1, tor1, tor2
    fin: Finalize "Form Union"

Materials
  mat2: Common "Gasoline" on all domains
    def "Basic"
      dynamicviscosity = eta(T)
      heatcapacity = Cp(T)
      density = rho(T)
      thermalconductivity = k(T)
      eta: Piecewise
        arg = T
        pieces = 
          {223.0, 333.0, 0.324353602-0.00537461379*T^1+3.59844043E-5*T^2-1.20923936E-7*T^3+2.03268518E-10*T^4-1.36463565E-13*T^5}
          {333.0, 473.0, 0.0131006893-1.09480193E-4*T^1+3.54223845E-7*T^2-5.17530271E-10*T^3+2.85912005E-13*T^4}
        argunit = K
        fununit = Pa*s
      Cp: Piecewise | arg = T; pieces = {293.0, 473.0, 1118.75206+1.7995872*T^1+0.00479876161*T^2}; argunit = K; fununit = J/(kg*K)
      rho: Piecewise | arg = T; pieces = {293.0, 473.0, 869.056455-0.0385817485*T^1-0.00125534424*T^2}; argunit = K; fununit = kg/m^3
      k: Piecewise | arg = T; pieces = {223.0, 473.0, 0.176151-2.03216216E-4*T^1}; argunit = K; fununit = W/(m*K)

Physics
  spf: LaminarFlow on domains 1-4
    dependent variable u = {u, v, w}
    fp1: FluidProperties (default)
    init1: init "Initial Values 1" (default)
    wallbc1: WallBC "Wall 1" (default)
    inl1: InletBoundary "Inlet 1" on boundaries 1 | U0in = 0.1
    out1: OutletBoundary "Outlet 1" on boundaries 19, 20

Mesh
  mesh1 "Mesh 1"
    size: MeshSizeDefault | hmax = 0.0016; hmin = 2.88E-4; hcurve = 0.6; hnarrow = 0.5; hgrad = 1.5
    bl1: BndLayer "Boundary Layers 1" on entire geometry | sharpcorners = none
      blp: BndLayerProp "Boundary Layer Properties" on no boundaries

Studies
  std1 "Study 1"
    stat: Stationary

Solver configurations
  sol1 "Solution 1" (study std1)
    v1: Variables "Dependent Variables 1"
    s1: Stationary "Stationary Solver 1"
      fc1: FullyCoupled | linsolver = i1; initstep = 0.01; maxiter = 100
      i1: Iterative "AMG, fluid flow variables (spf)" | nlinnormuse = on; maxlinit = 1000; rhob = 20
        mg1: Multigrid | prefun = saamg; maxcoarsedof = 80000; strconn = 0.02; saamgcompwise = on

Datasets
  dset1: Solution | solution = sol1
  surf1: Surface "Exterior Walls" on boundaries 2-5, 8, 10, 12-14, 16-18 | data = dset1

Plots
  pg1: PlotGroup3D "Velocity (spf)" | data = dset1
    slc1: Slice | expr = spf.U; quickplane = zx; quickynumber = 8
    con1: Contour (disabled) | expr = spf.U
  pg2: PlotGroup3D "Pressure (spf)" | data = surf1
    surf1: Surface | expr = p
      tran1: Transparency

Exports
  anim1: Animation | target = player